# Входные данные:
# [component: outputs data]
# Сортировка по году:
data_new := csort(data, 0)
year := data_new[:, 0]
price := data_new[:, 1]
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mn := min(year) = 1998
length(year) = 326
last(year) = 325
mx := max(year) = 2017
i :=
    n ← 0
    j ← 0
    M ← 0
    M[j] ← year[n]
    while n < last(year)
        n ← n + 1
        if year[n] ≠ year[n - 1]
            j ← j + 1
            M[j] ← year[n]
    return M
srednie(x) :=
    n ← 0
    j ← 0
    B ← 0
    while n ≤ last(year)
        if year[n] == x
            B[j] ← price[n]
            j ← j + 1
        n ← n + 1
    return mean(B)
i[0] = 1998
u := 0 .. last(i)
k[u] := srednie(i[u])
[a; b; c] := expfit(year, price) = [0; 0.165169; 269787]
f(year) := a*exp(b*year) + c
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k = [199000; 260000; 350000; 500000; 510000; 607250; 615847; 635000; 742571; 847500; 964273; 1019000; 1177786; 1226429; 1575983; 1771130]
# Коэффициент Корреляции:
corr(price, f(year)) = 0.959184
out[:, 0] := i
out[:, 1] := round(k, 0)
out = [
    1998, 199000;
    1999, 260000;
    2002, 350000;
    2003, 500000;
    2006, 510000;
    2007, 607250;
    2008, 615847;
    2009, 635000;
    2010, 742571;
    2011, 847500;
    2012, 964273;
    2013, 1019000;
    2014, 1177786;
    2015, 1226429;
    2016, 1575983;
    2017, 1771130
]
